@Parser   MaterialLaw;
@Law      ThermalExpansionCoefficientTest;
@Author   Thomas Helfer;
@Date     06/03/2014;

// output of law
@Output a ;

@Constant ReferenceTemperature =  293.15;

@Function{
  a = 2.e-5;
} // end of Function
